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/batch
! ANSYS input file written by Workbench version 2020 R1
! File used for geometry attach: A:\Documents\ICL\PDM\aeroframe_2\test\static\7_wingWindTunnel\AnsysPart\simulation1_files\dp0\SYS-1\DM\SYS-1.scdoc
/title,simulation1--Structure statique (A5)
/com,--- Data in consistent MKS units. See Solving Units in the help system for more information.
/units,MKS
/prep7
! Turn off shape checking because checks already performed inside WB mesher.
! See help system for more information.
SHPP,OFF,,NOWARN
etcon,set             ! allow ANSYS to choose best KEYOP's for 180x elements
/com,*********** Nodes for the whole assembly ***********
nblock,3,,5134
(1i9,3e20.9e3)
        1     3.789582414E-02    -5.005205920E-01     3.779644666E-02
        2     1.878958241E-01    -5.005205920E-01     3.779644666E-02
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-1
/com,*********** Elements for Body 1 "SYS-1\Open CASCADE STEP translator 6.8 3" ***********
et,1,187
eblock,19,solid,,2237
(19i9)
        1        1        1        1        0        0        0        0       10        0        1      229      275      654      405     2478     2620     2482     2479
     2617     3235
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-1
/com,*********** Send User Defined Coordinate System(s) ***********
csys,0
toffst,273.15,  ! Temperature offset from absolute zero
/com,*********** Set Reference Temperature ***********
tref,22.
/com,*********** Send Materials ***********
MP,EX,1,12000000,	! Pa
MP,NUXY,1,0.3,
MP,DENS,1,1190,	! kg m^-3

!************************* Model Summary ********************
!SYS-1\Open CASCADE STEP translator 6.8 3,	NinjaFlex,	matid,	1
!************************* End Model Summary ********************
/com,*********** Fixed Supports ***********
CMBLOCK,_FIXEDSU,NODE,       72
(8i10)
        15        25        26        27        28        29        40        41
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
cmsel,s,_FIXEDSU
d,all,all
nsel,all
/com,*********** Define Pressure Using Surface Effect Elements ***********
et,2,154
eblock,10,,,426
(15i9)
     3856        2        2        2        0      484      499      521      521     3566     3681      521     3569
     3857        2        2        2        0      490      512      496      496     3624     3665      496     3621
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-1
esel,s,type,,2
esel,all
esel,all
fini
/com,****************************************************************************
/com,*************************    SOLUTION       ********************************
/com,****************************************************************************
/solu
antype,0                   ! static analysis
_thickRatio=  0     ! Ratio of thick parts in the model
eqsl,sparse,,,,,1
cntr,print,1               ! print out contact info and also make no initial contact an error
dmpoption,emat,no             ! Don't combine emat file for DANSYS
dmpoption,esav,no             ! Don't combine esav file for DANSYS
nldiag,cont,iter           ! print out contact info each equilibrium iteration
rescontrol,,none                 ! Do not keep any restart files
/com,****************************************************
/com,******************* SOLVE FOR LS 1 OF 1 ****************
esel,s,type,,2
nsle
sf,all,pres,-20.
nsel,all
esel,all
esel,all
nsub,1,1,1
time,1.
outres,erase
outres,all,none
outres,nsol,all,
outres,rsol,all
outres,eangl,all
outres,etmp,all
outres,veng,all
outres,strs,all,
outres,epel,all,
outres,eppl,all,
outres,cont,all,
! *********** WB SOLVE COMMAND ***********
! check interactive state
*get,ANSINTER_,active,,int
*if,ANSINTER_,ne,0,then
/eof
*endif
solve
/com *************** Write FE CONNECTORS *********
CEWRITE,file,ce,,INTE
/com,****************************************************
/com,*************** FINISHED SOLVE FOR LS 1 *************
/post1
fini
